# OpenSim document version 40600
AnalyzeTool:
  replace_force_set: false
  results_directory: MuscleAnalysis
  output_precision: 8
  initial_time: 0
  final_time: 22.9167
  solve_for_equilibrium_for_auxiliary_states: false
  maximum_number_of_integrator_steps: 20000
  maximum_integrator_step_size: 1
  minimum_integrator_step_size: 1e-8
  integrator_error_tolerance: 1e-5
  coordinates_file: /home/ubuntu/injury_detection/jupyter_notebooks/risk/motionConfig/01_01_ik.mot
  lowpass_cutoff_frequency_for_coordinates: 6
  AnalysisSet Analyses:
    StaticOptimization: start_time=0 end_time=22.9167 step_interval=1 in_degrees=true use_model_force_set=true
        activation_exponent=2 use_muscle_physiology=true optimizer_convergence_criterion=0.0001
        optimizer_max_iterations=100
  ControllerSet Controllers:
    ControlSetController: controls_file=/path/to/your/control_file.sto
