# OpenSim document version 40000
InverseKinematicsTool output_motion_segment_0:
  model_file: /home/ubuntu/injury_detection/risk_analysis_package/data/bsm.osim
  marker_file: /home/ubuntu/injury_detection/risk_analysis_package/data/KD_injured/trc_data/trials/KD_injured.trc
  output_motion_file: /home/ubuntu/injury_detection/risk_analysis_package/data/KD_injured/KD_injured_ik.mot
  accuracy: 1e-5
  report_errors: true
  IKTaskSet IK_tasks:
    IKMarkerTask BLTI: weight=1 apply=true
    IKMarkerTask BRTI: weight=1 apply=true
    IKMarkerTask C7: weight=1 apply=true
    IKMarkerTask CHIN: weight=1 apply=true
    IKMarkerTask CLAV: weight=1 apply=true
    IKMarkerTask FBBT: weight=1 apply=true
    IKMarkerTask FLTI: weight=1 apply=true
    IKMarkerTask FRBT: weight=1 apply=true
    IKMarkerTask FRTI: weight=1 apply=true
    IKMarkerTask LAKI: weight=1 apply=true
    IKMarkerTask LANK: weight=1 apply=true
    IKMarkerTask LBAC: weight=1 apply=true
    IKMarkerTask LBHD: weight=1 apply=true
    IKMarkerTask LBWT: weight=1 apply=true
    IKMarkerTask LELB: weight=1 apply=true
    IKMarkerTask LELS: weight=1 apply=true
    IKMarkerTask LELSO: weight=1 apply=true
    IKMarkerTask LFBB: weight=1 apply=true
    IKMarkerTask LFBT: weight=1 apply=true
    IKMarkerTask LFFB: weight=1 apply=true
    IKMarkerTask LFFT: weight=1 apply=true
    IKMarkerTask LFHD: weight=1 apply=true
    IKMarkerTask LFIN: weight=1 apply=true
    IKMarkerTask LFLB: weight=1 apply=true
    IKMarkerTask LFLT: weight=1 apply=true
    IKMarkerTask LFMB: weight=1 apply=true
    IKMarkerTask LFMT: weight=1 apply=true
    IKMarkerTask LFPI: weight=1 apply=true
    IKMarkerTask LFRM: weight=1 apply=true
    IKMarkerTask LFWT: weight=1 apply=true
    IKMarkerTask LHAP: weight=1 apply=true
    IKMarkerTask LHBA: weight=1 apply=true
    IKMarkerTask LHEB: weight=1 apply=true
    IKMarkerTask LHEE: weight=1 apply=true
    IKMarkerTask LHFR: weight=1 apply=true
    IKMarkerTask LHME: weight=1 apply=true
    IKMarkerTask LHPI: weight=1 apply=true
    IKMarkerTask LHTH: weight=1 apply=true
    IKMarkerTask LHTO: weight=1 apply=true
    IKMarkerTask LKNE: weight=1 apply=true
    IKMarkerTask LKNI: weight=1 apply=true
    IKMarkerTask LMT5: weight=1 apply=true
    IKMarkerTask LSCA: weight=1 apply=true
    IKMarkerTask LSHN: weight=1 apply=true
    IKMarkerTask LSHO: weight=1 apply=true
    IKMarkerTask LTIA: weight=1 apply=true
    IKMarkerTask LTIB: weight=1 apply=true
    IKMarkerTask LTIC: weight=1 apply=true
    IKMarkerTask LTOE: weight=1 apply=true
    IKMarkerTask LTOP: weight=1 apply=true
    IKMarkerTask LTOS: weight=1 apply=true
    IKMarkerTask LUMB: weight=1 apply=true
    IKMarkerTask LUMC: weight=1 apply=true
    IKMarkerTask LWRA: weight=1 apply=true
    IKMarkerTask LWRB: weight=1 apply=true
    IKMarkerTask NOSE: weight=1 apply=true
    IKMarkerTask RAKI: weight=1 apply=true
    IKMarkerTask RANK: weight=1 apply=true
    IKMarkerTask RBAC: weight=1 apply=true
    IKMarkerTask RBHD: weight=1 apply=true
    IKMarkerTask RBWT: weight=1 apply=true
    IKMarkerTask RELB: weight=1 apply=true
    IKMarkerTask RELS: weight=1 apply=true
    IKMarkerTask RELSO: weight=1 apply=true
    IKMarkerTask RFBB: weight=1 apply=true
    IKMarkerTask RFBT: weight=1 apply=true
    IKMarkerTask RFFB: weight=1 apply=true
    IKMarkerTask RFFT: weight=1 apply=true
    IKMarkerTask RFHD: weight=1 apply=true
    IKMarkerTask RFIN: weight=1 apply=true
    IKMarkerTask RFLB: weight=1 apply=true
    IKMarkerTask RFLT: weight=1 apply=true
    IKMarkerTask RFMB: weight=1 apply=true
    IKMarkerTask RFMT: weight=1 apply=true
    IKMarkerTask RFPI: weight=1 apply=true
    IKMarkerTask RFRM: weight=1 apply=true
    IKMarkerTask RFWT: weight=1 apply=true
    IKMarkerTask RHAP: weight=1 apply=true
    IKMarkerTask RHBA: weight=1 apply=true
    IKMarkerTask RHEB: weight=1 apply=true
    IKMarkerTask RHEE: weight=1 apply=true
    IKMarkerTask RHFR: weight=1 apply=true
    IKMarkerTask RHME: weight=1 apply=true
    IKMarkerTask RHPI: weight=1 apply=true
    IKMarkerTask RHTH: weight=1 apply=true
    IKMarkerTask RHTO: weight=1 apply=true
    IKMarkerTask RIBL: weight=1 apply=true
    IKMarkerTask RIBR: weight=1 apply=true
    IKMarkerTask RITL: weight=1 apply=true
    IKMarkerTask RITR: weight=1 apply=true
    IKMarkerTask RKNE: weight=1 apply=true
    IKMarkerTask RKNI: weight=1 apply=true
    IKMarkerTask RMT5: weight=1 apply=true
    IKMarkerTask RSCA: weight=1 apply=true
    IKMarkerTask RSHN: weight=1 apply=true
    IKMarkerTask RSHO: weight=1 apply=true
    IKMarkerTask RTIA: weight=1 apply=true
    IKMarkerTask RTIB: weight=1 apply=true
    IKMarkerTask RTIC: weight=1 apply=true
    IKMarkerTask RTOE: weight=1 apply=true
    IKMarkerTask RTOP: weight=1 apply=true
    IKMarkerTask RTOS: weight=1 apply=true
    IKMarkerTask RWRA: weight=1 apply=true
    IKMarkerTask RWRB: weight=1 apply=true
    IKMarkerTask THD: weight=1 apply=true
